*Heading
** Job name: test5 Model name: test5
** Generated by: Abaqus/CAE 6.12-2
*Preprint, echo=NO, model=NO, history=NO, contact=NO
**
** PARTS
**
*Part, name=PART-1-MESH-1
*Node
      1,          -1.,          -1.,           0.
      2,           1.,          -1.,           0.
      3,          -1.,           1.,           0.
      4,           1.,           1.,           0.
      5,          -1.,          -1.,         0.25
      6,           1.,          -1.,         0.25
      7,          -1.,           1.,         0.25
      8,           1.,           1.,         0.25
*Element, type=C3D8
1, 1, 2, 4, 3, 5, 6, 8, 7
*Nset, nset=Set-1
 5,
*Elset, elset=_ztop_S2, internal
 1,
*Surface, type=ELEMENT, name=ztop
_ztop_S2, S2
*Elset, elset=_zbot_S1, internal
 1,
*Surface, type=ELEMENT, name=zbot
_zbot_S1, S1
*Elset, elset=_xbot_S6, internal
 1,
*Surface, type=ELEMENT, name=xbot
_xbot_S6, S6
*Elset, elset=_xtop_S4, internal
 1,
*Surface, type=ELEMENT, name=xtop
_xtop_S4, S4
*Elset, elset=_ytop_S5, internal
 1,
*Surface, type=ELEMENT, name=ytop
_ytop_S5, S5
*Elset, elset=_ybot_S3, internal
 1,
*Surface, type=ELEMENT, name=ybot
_ybot_S3, S3
*End Part
**
*Part, name=PART-2-MESH-1
*Node
      1,          -1.,          -1.,           0.
      2,           1.,          -1.,           0.
      3,          -1.,           1.,           0.
      4,           1.,           1.,           0.
      5,          -1.,          -1.,         0.25
      6,           1.,          -1.,         0.25
      7,          -1.,           1.,         0.25
      8,           1.,           1.,         0.25
*Element, type=C3D8
1, 1, 2, 4, 3, 5, 6, 8, 7
*Nset, nset=Set-1
 5,
*Elset, elset=_ztop_S2, internal
 1,
*Surface, type=ELEMENT, name=ztop
_ztop_S2, S2
*Elset, elset=_zbot_S1, internal
 1,
*Surface, type=ELEMENT, name=zbot
_zbot_S1, S1
*End Part
**
**
** ASSEMBLY
**
*Assembly, name=Assembly
**
*Instance, name=PART-1-MESH-1-1, part=PART-1-MESH-1
*End Instance
**
*Instance, name=PART-2-MESH-1-1, part=PART-2-MESH-1
          0.,           0.,         0.25
*End Instance
**
*Nset, nset=BOTTOM, instance=PART-1-MESH-1-1
 1, 2, 5, 6
*Nset, nset=BOTTOM, instance=PART-2-MESH-1-1
 1, 2, 5, 6
*Nset, nset=LEFT, instance=PART-1-MESH-1-1, generate
 1,  7,  2
*Nset, nset=LEFT, instance=PART-2-MESH-1-1, generate
 1,  7,  2
*Nset, nset=RIGHT, instance=PART-1-MESH-1-1, generate
 2,  8,  2
*Nset, nset=RIGHT, instance=PART-2-MESH-1-1, generate
 2,  8,  2
*Nset, nset=TOP, instance=PART-1-MESH-1-1
 3, 4, 7, 8
*Nset, nset=TOP, instance=PART-2-MESH-1-1
 3, 4, 7, 8
*Elset, elset=_aztop_S2, internal, instance=PART-2-MESH-1-1
 1,
*Surface, type=ELEMENT, name=aztop
_aztop_S2, S2
*Elset, elset=_azbot_S1, internal, instance=PART-1-MESH-1-1
 1,
*Surface, type=ELEMENT, name=azbot
_azbot_S1, S1
*Elset, elset=_axbot_S6, internal, instance=PART-1-MESH-1-1
 1,
*Elset, elset=_axbot_S6, internal, instance=PART-2-MESH-1-1
 1,
*Surface, type=ELEMENT, name=axbot
_axbot_S6, S6
*Elset, elset=_axtop_S4, internal, instance=PART-2-MESH-1-1
 1,
*Elset, elset=_axtop_S4, internal, instance=PART-1-MESH-1-1
 1,
*Surface, type=ELEMENT, name=axtop
_axtop_S4, S4
*Elset, elset=_aytop_S5, internal, instance=PART-2-MESH-1-1
 1,
*Elset, elset=_aytop_S5, internal, instance=PART-1-MESH-1-1
 1,
*Surface, type=ELEMENT, name=aytop
_aytop_S5, S5
*Elset, elset=_aybot_S3, internal, instance=PART-2-MESH-1-1
 1,
*Elset, elset=_aybot_S3, internal, instance=PART-1-MESH-1-1
 1,
*Surface, type=ELEMENT, name=aybot
_aybot_S3, S3
** Constraint: Constraint-1
*Tie, name=Constraint-1, adjust=yes
PART-1-MESH-1-1.ztop, PART-2-MESH-1-1.zbot
*End Assembly
**
** BOUNDARY CONDITIONS
**
** Name: Disp-BC-1 Type: Displacement/Rotation
*Boundary
BOTTOM, 2, 2
** Name: Disp-BC-2 Type: Displacement/Rotation
*Boundary
LEFT, 1, 1
** Name: Disp-BC-3 Type: Displacement/Rotation
*Boundary
RIGHT, 1, 1
** ----------------------------------------------------------------
**
** STEP: tension
**
*Step, name=tension
*Static
0.0001, 0.001, 1e-07, 0.0001
**
** BOUNDARY CONDITIONS
**
** Name: Vel-BC-1 Type: Velocity/Angular velocity
*Boundary, type=VELOCITY
TOP, 2, 2, 1.
**
** CONTROLS
**
*Controls, reset
*Controls, parameters=time incrementation
1600, 2000, , 3000, 2400, 50, , 125, , ,
**
** OUTPUT REQUESTS
**
*Restart, write, frequency=0
**
** FIELD OUTPUT: F-Output-1
**
*Output, field, variable=PRESELECT
**
** HISTORY OUTPUT: H-Output-1
**
*Output, history, variable=PRESELECT
*End Step
