*Heading
** Job name: Patch1 Model name: Patch1
** Generated by: Abaqus/CAE 6.11-1
*Preprint, echo=NO, model=NO, history=NO, contact=NO
**
*Part, name=PART-1-MESH-1
*NODE,INPUT=uel_nodes.inp
*USER ELEMENT, TYPE=U308, NODES=120, COORDINATES=3, PROPERTIES=1, VARIABLES=1
1,2,3
*ELEMENT, TYPE=U308, ELSET=fnm, INPUT=uel_elems.inp
*UEL PROPERTY, ELSET=fnm
1
*End Part
*Assembly, name=Assembly
*Instance, name=PART-1-MESH-1-1, part=PART-1-MESH-1
*End Instance
*Nset, nset=BOTTOM, instance=PART-1-MESH-1-1
1,2,5,6,9,10,17,18,25,26,29,30,33,34,
41,42,49,50,53,54,57,58,65,66,73,74,77,78,
81,82,89,90
*Nset, nset=LEFT, instance=PART-1-MESH-1-1
1,3,5,7,15,16,23,24,25,27,29,31,39,40,
47,48,49,51,53,55,63,64,71,72,73,75,77,79,
87,88,95,96
*Nset, nset=RIGHT, instance=PART-1-MESH-1-1
2,4,6,8,11,12,19,20,26,28,30,32,35,36,
43,44,50,52,54,56,59,60,67,68,74,76,78,80,
83,84,91,92
*Nset, nset=TOP, instance=PART-1-MESH-1-1
3,4,7,8,13,14,21,22,27,28,31,32,37,38,
45,46,51,52,55,56,61,62,69,70,75,76,79,80,
85,86,93,94
*Nset, nset=BACK, instance=PART-1-MESH-1-1
1,2,3,4,9,10,15,16,11,12,13,14
*End Assembly
*Boundary
BOTTOM, 2, 2
*Boundary
BOTTOM, 1, 1
*Boundary
BOTTOM, 3, 3
*Boundary
TOP, 1, 1
*Boundary
TOP, 3, 3
** ----------------------------------------------------------------
**
** STEP: tension
**
*Step, name=tension, inc=1000
*Static
0.02, 0.1, 1e-07, 0.02
**
** BOUNDARY CONDITIONS
**
** Name: Vel-BC-1 Type: Velocity/Angular velocity
*Boundary, type=VELOCITY
TOP, 2, 2, 1.
**
** CONTROLS
**
*Controls, reset
*Controls, parameters=time incrementation
1600, 2000, , 3000, 2400, 50, , 125, , ,
**
** OUTPUT REQUESTS
**
*Restart, write, frequency=0
**
** FIELD OUTPUT: F-Output-1
**
*Output, field, variable=PRESELECT
**
** HISTORY OUTPUT: H-Output-1
**
*Output, history, variable=PRESELECT
*End Step
