*Heading
** Job name: OHTNettles Model name: OHTNettles
** Generated by: Abaqus/CAE 6.12-2
*Preprint, echo=NO, model=NO, history=NO, contact=NO
**
** PARTS
**
*Part, name=Part-1
*Node
1, 76.1999969, -19.0499992, 1.0
2, 76.1999969, 0.0, 1.0
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*USER ELEMENT, TYPE=U338, NODES=72, COORDINATES=3, PROPERTIES=1, VARIABLES=1
1,2,3
*Element, type=U338, elset=uel_xlam
1,759,107,106,735,487,34,35,463,2627,2628,2629,2630,2631,2632,2633,2634,2635,2636,2637,2638,2639,2640,2641,2642,
13553,12901,12900,13529,13281,12828,12829,13257,15421,15422,15423,15424,15425,15426,15427,15428,15429,15430,15431,15432,15433,15434,15435,15436,
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*UEL PROPERTY, elset=uel_xlam
1
*End Part
**
**
** ASSEMBLY
**
*Assembly, name=Assembly
**
*Instance, name=Part-1-1, part=Part-1
*End Instance
**
*Nset, nset=left, instance=Part-1-1
  12,  13,  14,  16,  19,  20
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*Nset, nset=right, instance=Part-1-1
   1,   2,   7,   8,  23,  24
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*End Assembly
**
** BOUNDARY CONDITIONS
**
** Name: FixLeft Type: Displacement/Rotation
*Boundary
left, 1, 1
left, 2, 2
left, 3, 3
** Name: FixRight Type: Displacement/Rotation
*Boundary
right, 2, 2
right, 3, 3
** ----------------------------------------------------------------
**
** STEP: Tension
**
*Step, name=Tension, inc=2800000
*Static
0.01, 2.8, 1e-06, 0.01
**
** BOUNDARY CONDITIONS
**
** Name: Pull Type: Velocity/Angular velocity
*Boundary, type=VELOCITY
right, 1, 1, 1.
**
** CONTROLS
**
*Controls, reset
*Controls, parameters=time incrementation
800, 1000, , 1500, 1200, 50, , 125, , ,
*Controls, parameters=field, field=displacement
0.01, , , , 0.05, , ,
*Controls, parameters=field, field=hydrostatic fluid pressure
0.01, , , , 0.05, , ,
*Controls, parameters=field, field=rotation
0.01, , , , 0.05, , ,
*Controls, parameters=field, field=electrical potential
0.01, , , , 0.05, , ,
**
** OUTPUT REQUESTS
**
*Restart, write, frequency=0
**
** FIELD OUTPUT: F-Output-1
**
*Output, field
*Node Output
RF, U
*Output, history, frequency=0
*End Step
