*Heading
** Job name: OHTNettles Model name: OHTNettles
** Generated by: Abaqus/CAE 6.12-2
*Preprint, echo=NO, model=NO, history=NO, contact=NO
**
*Part, name=Part-1
*NODE,INPUT=uel_nodes.inp
*USER ELEMENT, TYPE=U308, NODES=88, COORDINATES=3, PROPERTIES=1, VARIABLES=1
1,2,3
*ELEMENT, TYPE=U308, ELSET=fnm, INPUT=uel_elems.inp
*UEL PROPERTY, ELSET=fnm
1
*End Part
*Assembly, name=Assembly
*Instance, name=Part-1-1, part=Part-1
*End Instance
*Nset, nset=left, instance=Part-1-1
12,13,14,16,19,20
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*Nset, nset=right, instance=Part-1-1
1,2,7,8,23,24
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*End Assembly
*Boundary
left, 1, 1
*Boundary
left, 2, 2
*Boundary
left, 3, 3
*Boundary
right, 2, 2
*Boundary
right, 3, 3
** ----------------------------------------------------------------
**
** STEP: Tension
**
*Step, name=Tension, inc=2800000
*Static
0.01, 2.8, 1e-06, 0.01
**
** BOUNDARY CONDITIONS
**
** Name: Pull Type: Velocity/Angular velocity
*Boundary, type=VELOCITY
right, 1, 1, 1.
**
** CONTROLS
**
*Controls, reset
*Controls, parameters=time incrementation
800, 1000, , 1500, 1200, 50, , 125, , ,
*Controls, parameters=field, field=displacement
0.01, , , , 0.05, , ,
*Controls, parameters=field, field=hydrostatic fluid pressure
0.01, , , , 0.05, , ,
*Controls, parameters=field, field=rotation
0.01, , , , 0.05, , ,
*Controls, parameters=field, field=electrical potential
0.01, , , , 0.05, , ,
**
** OUTPUT REQUESTS
**
*Restart, write, frequency=0
**
** FIELD OUTPUT: F-Output-1
**
*Output, field
*Node Output
RF, U
*Output, history, frequency=0
*End Step
